d_t := 102 mm
k := 125 mm
p_ü := 8 bar = 0.8 MPa
D_N := 50 mm
d_3 := 72 mm
d_2 := 18 mm
D := 165 mm
d := D_N
d_4 := 102 mm
s := 2.9 mm
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# E360-as acél
# Az E360-as acélnak a folyáshatára R_eH := 355 MPa
# A biztonsági tényezőt n := 2-re választjuk
# Ekkor azt mondhatjuk, hogy a megengedhető legnagyobb hajlító feszültség:
σ_hajl := R_eH/n = 177.5 MPa
b_min := d_t/2*sqrt(3*p_ü/σ_hajl*(1 - 2*d_t/(3*k))) = 4.0046 mm
# A csavarok húzószilárdsági ellenőrzése
# A csavarokra kétféle igénybevétel hat: egy (σ_N) normál, ami a feszítő erőből származik, illetve egy csavaró feszültség (τ_t) ami a lecsavarodást akadályozza meg.
# Az ébredő feszültséget a σ_N = F_V/A_e képlettel számolhatjuk.
A_d := d^2*π/4
F_cső := p_ü*A_d = 1.5708 kN  # A vakkarimát nyomó csőerő a rögzítés révén húza a csavart
F_p := p_ü*(d_t^2 - d^2)*π/4 = 4.96623 kN  # Az üzemi nyomásból származó erő a tömítés felületén hat
# A tömítésre jellemző értékek:
# A tömítés szélessége:b_t := (D - d_4)/2 = 31.5 mm
# A tömítéseffektív szélessége:b'_t := 1.1*b_t
# Valamint a tömítés anyagát figyelembe vevő tényező: n_t := 1.5
F_t := n_t*p_ü*π*d_t*b'_t = 13.324 kN
F_ü := 1.2*(F_cső + F_p + F_t) = 23.8332 kN
# Mivel N := 4 csavarra méretezünk, így kiszámolhatjuk az előfeszítő erőt
F_V := F_ü/N = 5.95831 kN
d_e := (d_3 + d_2)/2 = 45 mm  # Ahol d_3 a magátmérő d_2a középátmérő d_e pedig az egyenértékű átmérő
A_e := d_e^2*π/4 = 1590.43 mm^2
σ_N := F_V/A_e = 3.74635 MPa  # Ahol σ_Na csavarban ébredő normál feszültség, F_V pedig az előfeszítés
# A csavarok csavarószilárdsági ellenőrzése
# A csavarkötés τ-igénybevétele a szilárdságtanból ismert képlet alapján: τ_t= M_t/I_p*r a keresztmetszetben kifelé haladva a feszültség folyamatosan nő, és a feszültségmaximum r := d_e/2 = 22.5 mm -nél van.
# A körkeresztmetszet poláris másodrendű nyomatéka I_p := d_e^4*π/32 = 402578 mm^4
# A csavarónyomaték két részből áll elő. Hat egy része a menetekben, ezt a menetemelkedés és a látszólagos súrlódási félkúpszög tangensével írhatjuk fel. Emellett hatnia kell egy savarónyomatéknak az anya alatt is, amely a becsavaráskor keletkezik, és egy anya alatti súrlódási együtthatóval írhatjuk fel.
# M_t= F_V*d_2/2*tan(α + ρ') + F_V*d_a/2*μ_a
# A menetemelkedés számítható a szabványban található adatokból. []
# P := 2 mm
α := atan(P/(d_2*π)) = 2.02558 deg
# Az anya alatti felfekvő felületet jellemzi a d_a, amelyet felírhatunk az átmérő és a laptávolság távolságából:
d_a := (d + s)/2 = 26.45 mm
# A súrlődási tényező μ_min := 0.1valamint μ_max := 0.23
# A menetemelkedés szöge metrikus menetre: β := 60°
ρ'_min := atan(μ_min/cos(β/2)) = 6.58678 deg
ρ'_max := atan(μ_max/cos(β/2)) = 14.8733 deg
M_tmin := F_V*d_2/2*tan(α + ρ'_min) + F_V*d_a/2*μ_min = 16.0017 N*m
M_tmax := F_V*d_2/2*tan(α + ρ'_max) + F_V*d_a/2*μ_max = 34.415 N*m
s_pe := d_e^4*π/32 = 402578 mm^4
τ_t := M_tmax/s_pe*d_e/2 = 1.92345 MPa
# Klein-diagram
# [plot: M_tmax (N*m), M_tmax*1.05 (N*m), M_tmax*0.95 (N*m), μ_min*x, μ_max*x vs x]
F_Vmin := M_tmax*0.95/μ_max = 142.149 J
F_Vmax := M_tmax*1.05/μ_min = 361.358 J
# Csavarok egyenértékű feszültségei
σ_egy := sqrt(σ_N^2 + 3*τ_t^2) = 5.01339 MPa
# Ezt kell összehasonlítani a csavar szakítószilárdságával, és az egyenletet átrendezve megkaphatjuk, hogy mennyire erős csavarra van szükségünk:
# σ_egy<σ_meg := R_eH/n = 177.5 MPa
R_eHmin := σ_egy*n = 10.0268 MPa
# Link:
# www.zetamec.com/din-2632-pn10_eng.htm
# http://www.tribology-abc.com/calculators/metric-iso.htm
